<neuroml xmlns="http://www.neuroml.org/schema/neuroml2"  xmlns:xs="http://www.w3.org/2001/XMLSchema" xmlns:xsi="http://www.w3.org/2001/XMLSchema-instance" xsi:schemaLocation="http://www.neuroml.org/schema/neuroml2 https://raw.github.com/NeuroML/NeuroML2/development/Schemas/NeuroML2/NeuroML_v2beta4.xsd" id="network_GranuleCell_multi">
    <ionChannel id="Gran_CaHVA_98" conductance="10pS" type="ionChannelHH" species="ca">
        <notes>A High Voltage Activated Ca2+ channel</notes>
        <gate id="m" instances="2" type="gateHHrates">
            <notes>Note: offset from ChannelML file incorporated into midpoint of rates!!</notes>
            <q10Settings experimentalTemp="17.350264793 degC" type="q10ExpTemp" q10Factor="3"/>
            <forwardRate midpoint="0.015V" rate="1600per_s" scale="0.01388888889V" type="HHSigmoidRate"/>
            <reverseRate midpoint="0.0011000000000000003V" rate="100per_s" scale="-0.005V" type="HHExpLinearRate"/>
        </gate>
        <gate id="h" instances="1" type="gateHHrates">
            <notes>Note: offset from ChannelML file incorporated into midpoint of rates!!</notes>
            <q10Settings experimentalTemp="17.350264793 degC" type="q10ExpTemp" q10Factor="3"/>
            <forwardRate type="Gran_CaHVA_98_h_alpha_rate"/>
            <reverseRate type="Gran_CaHVA_98_h_beta_rate"/>
        </gate>
    </ionChannel>
    <ionChannel id="Gran_H_98" conductance="10pS" type="ionChannelHH" species="h">
        <notes>Anomalous inward rectifying H conductance</notes>
        <gate id="n" instances="1" type="gateHHrates">
            <notes>Note: offset from ChannelML file incorporated into midpoint of rates!!</notes>
            <q10Settings experimentalTemp="17.350264793 degC" type="q10ExpTemp" q10Factor="3"/>
            <forwardRate midpoint="-0.065V" rate="0.8per_s" scale="-0.01100110011V" type="HHExpRate"/>
            <reverseRate midpoint="-0.065V" rate="0.8per_s" scale="0.01100110011V" type="HHExpRate"/>
        </gate>
    </ionChannel>
    <ionChannel id="Gran_KA_98" conductance="10pS" type="ionChannelHH" species="k">
        <notes>A-type K channel, with rate equations expressed in tau and inf form</notes>
        <gate id="m" instances="3" type="gateHHtauInf">
            <notes>Note: offset from ChannelML file incorporated into midpoint of rates!!</notes>
            <q10Settings experimentalTemp="17.350264793 degC" type="q10ExpTemp" q10Factor="1"/>
            <timeCourse type="Gran_KA_98_m_tau_tau"/>
            <steadyState midpoint="-0.036699999999999997V" rate="1." scale="0.0198V" type="HHSigmoidVariable"/>
        </gate>
        <gate id="h" instances="1" type="gateHHtauInf">
            <notes>Note: offset from ChannelML file incorporated into midpoint of rates!!</notes>
            <q10Settings experimentalTemp="17.350264793 degC" type="q10ExpTemp" q10Factor="1"/>
            <timeCourse type="Gran_KA_98_h_tau_tau"/>
            <steadyState midpoint="-0.0688V" rate="1." scale="-0.0084V" type="HHSigmoidVariable"/>
        </gate>
    </ionChannel>
    <ionChannel id="Gran_KCa_98" conductance="10pS" type="ionChannelHH" species="k">
        <notes>Calcium dependent K+ channel</notes>
        <gate id="m" instances="1" type="gateHHrates">
            <notes>Note: offset from ChannelML file incorporated into midpoint of rates!!</notes>
            <q10Settings experimentalTemp="17.350264793 degC" type="q10ExpTemp" q10Factor="3"/>
            <forwardRate type="Gran_KCa_98_m_alpha_rate"/>
            <reverseRate type="Gran_KCa_98_m_beta_rate"/>
        </gate>
    </ionChannel>
    <ionChannel id="Gran_KDr_98" conductance="10pS" type="ionChannelHH" species="k">
        <notes>Delayed rectifyer K channel</notes>
        <gate id="m" instances="4" type="gateHHrates">
            <notes>Note: offset from ChannelML file incorporated into midpoint of rates!!</notes>
            <q10Settings experimentalTemp="17.350264793 degC" type="q10ExpTemp" q10Factor="3"/>
            <forwardRate type="Gran_KDr_98_m_alpha_rate"/>
            <reverseRate type="Gran_KDr_98_m_beta_rate"/>
        </gate>
        <gate id="h" instances="1" type="gateHHrates">
            <notes>Note: offset from ChannelML file incorporated into midpoint of rates!!</notes>
            <q10Settings experimentalTemp="17.350264793 degC" type="q10ExpTemp" q10Factor="3"/>
            <forwardRate type="Gran_KDr_98_h_alpha_rate"/>
            <reverseRate type="Gran_KDr_98_h_beta_rate"/>
        </gate>
    </ionChannel>
    <ionChannel id="Gran_NaF_98" conductance="10pS" type="ionChannelHH" species="na">
        <notes>Fast inactivating Na+ channel</notes>
        <gate id="m" instances="3" type="gateHHratesTau">
            <notes>Note: offset from ChannelML file incorporated into midpoint of rates!!</notes>
            <q10Settings experimentalTemp="17.350264793 degC" type="q10ExpTemp" q10Factor="3"/>
            <forwardRate midpoint="-0.028999999999999998V" rate="1500per_s" scale="0.012345679V" type="HHExpRate"/>
            <reverseRate midpoint="-0.028999999999999998V" rate="1500per_s" scale="-0.0151515V" type="HHExpRate"/>
            <timeCourse type="Gran_NaF_98_m_tau_tau"/>
        </gate>
        <gate id="h" instances="1" type="gateHHratesTau">
            <notes>Note: offset from ChannelML file incorporated into midpoint of rates!!</notes>
            <q10Settings experimentalTemp="17.350264793 degC" type="q10ExpTemp" q10Factor="3"/>
            <forwardRate midpoint="-0.04V" rate="120per_s" scale="-0.01123596V" type="HHExpRate"/>
            <reverseRate midpoint="-0.04V" rate="120per_s" scale="0.01123596V" type="HHExpRate"/>
            <timeCourse type="Gran_NaF_98_h_tau_tau"/>
        </gate>
    </ionChannel>
    <ionChannel id="GranPassiveCond" conductance="10pS" type="ionChannelPassive">
        <notes>Simple leak conductance for Granule cell</notes>
    </ionChannel>
    <decayingPoolConcentrationModel id="Gran_CaPool_98" ion="ca" shellThickness="8.4e-8m" restingConc="7.55e-5mM" decayConstant="1e-2s"/>
    <cell neuroLexId="nifext_128" id="Granule_98">
        <notes>An implementation using ChannelML of the Granule cell mode from Maex, R and De Schutter, E. Synchronization of Golgi and Granule Cell Firing in a Detailed Network Model of the Cerebellar Granule Cell Layer, 1998</notes>
        <morphology id="morphology_Granule_98">
            <segment id="0" name="Soma">
                <proximal y="0.000000e+00" x="0.000000e+00" z="0.000000e+00" diameter="1.000000e+01"/>
                <distal y="0.000000e+00" x="0.000000e+00" z="0.000000e+00" diameter="1.000000e+01"/>
            </segment>
            <segmentGroup neuroLexId="sao864921383" id="Soma">
                <member segment="0"/>
            </segmentGroup>
            <segmentGroup id="all">
                <include segmentGroup="Soma"/>
            </segmentGroup>
            <segmentGroup neuroLexId="GO:0043025" id="soma_group">
                <include segmentGroup="Soma"/>
            </segmentGroup>
        </morphology>
        <biophysicalProperties id="biophys">
            <membraneProperties>
                <channelDensity id="Gran_CaHVA_98_all" segmentGroup="all" ion="ca" ionChannel="Gran_CaHVA_98" erev="80.0 mV" condDensity="0.9084216 mS_per_cm2"/>
                <channelDensity id="Gran_H_98_all" segmentGroup="all" ion="h" ionChannel="Gran_H_98" erev="-42.0 mV" condDensity="0.03090506 mS_per_cm2"/>
                <channelDensity id="Gran_KA_98_all" segmentGroup="all" ion="k" ionChannel="Gran_KA_98" erev="-90.0 mV" condDensity="1.14567 mS_per_cm2"/>
                <channelDensity id="Gran_KCa_98_all" segmentGroup="all" ion="k" ionChannel="Gran_KCa_98" erev="-90.0 mV" condDensity="17.9811 mS_per_cm2"/>
                <channelDensity id="Gran_KDr_98_all" segmentGroup="all" ion="k" ionChannel="Gran_KDr_98" erev="-90.0 mV" condDensity="8.89691 mS_per_cm2"/>
                <channelDensity id="Gran_NaF_98_all" segmentGroup="all" ion="na" ionChannel="Gran_NaF_98" erev="55.0 mV" condDensity="55.7227 mS_per_cm2"/>
                <channelDensity id="GranPassiveCond_all" segmentGroup="all" ion="non_specific" ionChannel="GranPassiveCond" erev="-65.0 mV" condDensity="0.0330033 mS_per_cm2"/>
                <spikeThresh segmentGroup="all" value="0 mV"/>
                <specificCapacitance segmentGroup="all" value="1.0 uF_per_cm2"/>
                <initMembPotential segmentGroup="all" value="-65.0 mV"/>
            </membraneProperties>
            <intracellularProperties>
                <species segmentGroup="all" ion="ca" initialExtConcentration="2.4E-6 mol_per_cm3" concentrationModel="Gran_CaPool_98" id="ca" initialConcentration="7.55E-11 mol_per_cm3"/>
                <resistivity segmentGroup="all" value="0.1 kohm_cm"/>
            </intracellularProperties>
        </biophysicalProperties>
    </cell>
    <pulseGenerator id="Gran_10pA" delay="100.0ms" duration="500.0ms" amplitude="10 pA"/>
    <pulseGenerator id="Gran_min2pA" delay="100.0ms" duration="500.0ms" amplitude="-2 pA"/>
    <pulseGenerator id="Gran_min5pA" delay="100.0ms" duration="500.0ms" amplitude="-5 pA"/>
    <network id="network_GranuleCell_multi" type="networkWithTemperature" temperature="32.0 degC">
        <population id="Gran" type="populationList" component="Granule_98" size="3">
            <instance id="0">
                <location y="0." x="0." z="0."/>
            </instance>
            <instance id="1">
                <location y="100." x="0." z="0."/>
            </instance>
            <instance id="2">
                <location y="200." x="0." z="0."/>
            </instance>
        </population>
        <inputList id="Gran_10pA" component="Gran_10pA" population="Gran">
            <input destination="synapses" id="0" target="../Gran/0/Granule_98"/>
        </inputList>
        <inputList id="Gran_min2pA" component="Gran_min2pA" population="Gran">
            <input destination="synapses" id="0" target="../Gran/1/Granule_98"/>
        </inputList>
        <inputList id="Gran_min5pA" component="Gran_min5pA" population="Gran">
            <input destination="synapses" id="0" target="../Gran/2/Granule_98"/>
        </inputList>
    </network>
    <ComponentType extends="baseVoltageDepRate" name="Gran_CaHVA_98_h_alpha_rate">
        <Constant name="TIME_SCALE" value="1 s" dimension="time"/>
        <Constant name="VOLT_SCALE" value="1 V" dimension="voltage"/>
        <Constant name="offset" value="0.010V" dimension="voltage"/>
        <Dynamics>
            <DerivedVariable name="V" value="(v - offset) / VOLT_SCALE" dimension="none"/>
            <ConditionalDerivedVariable exposure="r" name="r" dimension="per_time">
                <Case value="( 5.0 ) / TIME_SCALE" condition="V   .lt. ( -0.060 )"/>
                <Case value="( 5 * (exp (-50 * (V - (-0.060))))) / TIME_SCALE"/>
            </ConditionalDerivedVariable>
        </Dynamics>
    </ComponentType>
    <ComponentType extends="baseVoltageDepRate" name="Gran_CaHVA_98_h_beta_rate">
        <Constant name="TIME_SCALE" value="1 s" dimension="time"/>
        <Constant name="VOLT_SCALE" value="1 V" dimension="voltage"/>
        <Constant name="offset" value="0.010V" dimension="voltage"/>
        <Dynamics>
            <DerivedVariable name="V" value="(v - offset) / VOLT_SCALE" dimension="none"/>
            <ConditionalDerivedVariable exposure="r" name="r" dimension="per_time">
                <Case value="( 0 ) / TIME_SCALE" condition="V   .lt. ( -0.060 )"/>
                <Case value="( 5 - (5 * (exp (-50 * (V - (-0.060)))))) / TIME_SCALE"/>
            </ConditionalDerivedVariable>
        </Dynamics>
    </ComponentType>
    <ComponentType extends="baseVoltageDepTime" name="Gran_KA_98_m_tau_tau">
        <Constant name="TIME_SCALE" value="1 s" dimension="time"/>
        <Constant name="VOLT_SCALE" value="1 V" dimension="voltage"/>
        <Constant name="offset" value="0.010V" dimension="voltage"/>
        <Dynamics>
            <DerivedVariable name="V" value="(v - offset) / VOLT_SCALE" dimension="none"/>
            <DerivedVariable exposure="t" name="t" value="(0.410e-3 * ((exp (( ((V) + 0.0435) / (-0.0428))))) + 0.167e-3) * TIME_SCALE" dimension="time"/>
        </Dynamics>
    </ComponentType>
    <ComponentType extends="baseVoltageDepTime" name="Gran_KA_98_h_tau_tau">
        <Constant name="TIME_SCALE" value="1 s" dimension="time"/>
        <Constant name="VOLT_SCALE" value="1 V" dimension="voltage"/>
        <Constant name="offset" value="0.010V" dimension="voltage"/>
        <Dynamics>
            <DerivedVariable name="V" value="(v - offset) / VOLT_SCALE" dimension="none"/>
            <DerivedVariable exposure="t" name="t" value="(0.001 * (10.8 + (30 * V) + (1 / (57.9 * (exp (V * 127)) + (134e-6 * (exp (V * (-59)))))))) * TIME_SCALE" dimension="time"/>
        </Dynamics>
    </ComponentType>
    <ComponentType extends="baseVoltageConcDepRate" name="Gran_KCa_98_m_alpha_rate">
        <Constant name="TIME_SCALE" value="1 s" dimension="time"/>
        <Constant name="VOLT_SCALE" value="1 V" dimension="voltage"/>
        <Constant name="CONC_SCALE" value="1 mM" dimension="concentration"/>
        <Constant name="offset" value="0.010V" dimension="voltage"/>
        <Dynamics>
            <DerivedVariable name="V" value="(v - offset) / VOLT_SCALE" dimension="none"/>
            <DerivedVariable name="ca_conc" value="caConc / CONC_SCALE" dimension="none"/>
            <DerivedVariable exposure="r" name="r" value="(2500/(1 + ( (1.5e-3 *(exp (-85*V))) / ca_conc))) / TIME_SCALE" dimension="per_time"/>
        </Dynamics>
    </ComponentType>
    <ComponentType extends="baseVoltageConcDepRate" name="Gran_KCa_98_m_beta_rate">
        <Constant name="TIME_SCALE" value="1 s" dimension="time"/>
        <Constant name="VOLT_SCALE" value="1 V" dimension="voltage"/>
        <Constant name="CONC_SCALE" value="1 mM" dimension="concentration"/>
        <Constant name="offset" value="0.010V" dimension="voltage"/>
        <Dynamics>
            <DerivedVariable name="V" value="(v - offset) / VOLT_SCALE" dimension="none"/>
            <DerivedVariable name="ca_conc" value="caConc / CONC_SCALE" dimension="none"/>
            <DerivedVariable exposure="r" name="r" value="(1500/(1 + (ca_conc / (1.5e-4 * (exp (-77*V)))))) / TIME_SCALE" dimension="per_time"/>
        </Dynamics>
    </ComponentType>
    <ComponentType extends="baseVoltageDepRate" name="Gran_KDr_98_m_alpha_rate">
        <Constant name="TIME_SCALE" value="1 s" dimension="time"/>
        <Constant name="VOLT_SCALE" value="1 V" dimension="voltage"/>
        <Constant name="offset" value="0.010V" dimension="voltage"/>
        <Dynamics>
            <DerivedVariable name="V" value="(v - offset) / VOLT_SCALE" dimension="none"/>
            <DerivedVariable exposure="r" name="r" value="(170 * ((exp (73 *(V - (-0.038)))))) / TIME_SCALE" dimension="per_time"/>
        </Dynamics>
    </ComponentType>
    <ComponentType extends="baseVoltageDepRate" name="Gran_KDr_98_m_beta_rate">
        <Constant name="TIME_SCALE" value="1 s" dimension="time"/>
        <Constant name="VOLT_SCALE" value="1 V" dimension="voltage"/>
        <Constant name="offset" value="0.010V" dimension="voltage"/>
        <Dynamics>
            <DerivedVariable name="V" value="(v - offset) / VOLT_SCALE" dimension="none"/>
            <DerivedVariable exposure="r" name="r" value="(170 * ((exp ((-18) *(V - (-0.038)))))) / TIME_SCALE" dimension="per_time"/>
        </Dynamics>
    </ComponentType>
    <ComponentType extends="baseVoltageDepRate" name="Gran_KDr_98_h_alpha_rate">
        <Constant name="TIME_SCALE" value="1 s" dimension="time"/>
        <Constant name="VOLT_SCALE" value="1 V" dimension="voltage"/>
        <Constant name="offset" value="0.010V" dimension="voltage"/>
        <Dynamics>
            <DerivedVariable name="V" value="(v - offset) / VOLT_SCALE" dimension="none"/>
            <ConditionalDerivedVariable exposure="r" name="r" dimension="per_time">
                <Case value="( 0.76 ) / TIME_SCALE" condition="V  .gt. ( -0.046 )"/>
                <Case value="( 0.7 + 0.065*(exp (-80*(V - (-0.046))))) / TIME_SCALE"/>
            </ConditionalDerivedVariable>
        </Dynamics>
    </ComponentType>
    <ComponentType extends="baseVoltageDepRate" name="Gran_KDr_98_h_beta_rate">
        <Constant name="TIME_SCALE" value="1 s" dimension="time"/>
        <Constant name="VOLT_SCALE" value="1 V" dimension="voltage"/>
        <Constant name="offset" value="0.010V" dimension="voltage"/>
        <Dynamics>
            <DerivedVariable name="V" value="(v - offset) / VOLT_SCALE" dimension="none"/>
            <DerivedVariable exposure="r" name="r" value="(1.1/(1 + (exp (-80.7 * (V - (-0.044)))))) / TIME_SCALE" dimension="per_time"/>
        </Dynamics>
    </ComponentType>
    <ComponentType extends="baseVoltageDepTime" name="Gran_NaF_98_m_tau_tau">
        <Constant name="TIME_SCALE" value="1 s" dimension="time"/>
        <Constant name="VOLT_SCALE" value="1 V" dimension="voltage"/>
        <Constant name="offset" value="0.010V" dimension="voltage"/>
        <Requirement name="alpha" dimension="per_time"/>
        <Requirement name="beta" dimension="per_time"/>
        <Dynamics>
            <DerivedVariable name="V" value="(v - offset) / VOLT_SCALE" dimension="none"/>
            <DerivedVariable name="ALPHA" value="alpha * TIME_SCALE" dimension="none"/>
            <DerivedVariable name="BETA" value="beta * TIME_SCALE" dimension="none"/>
            <ConditionalDerivedVariable exposure="t" name="t" dimension="time">
                <Case value="( 0 ) * TIME_SCALE" condition="(ALPHA + BETA) .eq. 0"/>
                <Case value="( 0.00005 ) * TIME_SCALE" condition="1/(ALPHA + BETA)  .lt. ( 0.00005 )"/>
                <Case value="( 1/(ALPHA + BETA)) * TIME_SCALE"/>
            </ConditionalDerivedVariable>
        </Dynamics>
    </ComponentType>
    <ComponentType extends="baseVoltageDepTime" name="Gran_NaF_98_h_tau_tau">
        <Constant name="TIME_SCALE" value="1 s" dimension="time"/>
        <Constant name="VOLT_SCALE" value="1 V" dimension="voltage"/>
        <Constant name="offset" value="0.010V" dimension="voltage"/>
        <Requirement name="alpha" dimension="per_time"/>
        <Requirement name="beta" dimension="per_time"/>
        <Dynamics>
            <DerivedVariable name="V" value="(v - offset) / VOLT_SCALE" dimension="none"/>
            <DerivedVariable name="ALPHA" value="alpha * TIME_SCALE" dimension="none"/>
            <DerivedVariable name="BETA" value="beta * TIME_SCALE" dimension="none"/>
            <ConditionalDerivedVariable exposure="t" name="t" dimension="time">
                <Case value="( 0 ) * TIME_SCALE" condition="(ALPHA + BETA) .eq. 0"/>
                <Case value="( 0.000225 ) * TIME_SCALE" condition="1/(ALPHA + BETA)  .lt. ( 0.000225 )"/>
                <Case value="( 1/(ALPHA + BETA)) * TIME_SCALE"/>
            </ConditionalDerivedVariable>
        </Dynamics>
    </ComponentType>
</neuroml>
